module commercial;
module tape {
	csv_data_only 1;
}

script on_term "python3 test_ceus_saveplots.py";

clock {
	timezone US/CA/Los Angeles;
	starttime '2018-01-01 00:00:00 PST';
	stoptime '2019-01-01 00:00:00 PST';
}
object ceus {
	name small_office;
	filename "FCZ01_SOFF.csv";
	floor_area 10 ksf;
	composition "Heating:{ZR:0.9;PR:0.1;PI:0.01}";
	composition "Cooling:{ZR:0.9;PR:0.1;PI:0.01}";
	composition "Ventilation:{ZR:0.9;PR:0.1;PI:0.01}";
	composition "Water_Heating:{ZR:0.9;PR:0.1;PI:0.01}";
	composition "Refrigeration:{ZR:0.9;PR:0.1;PI:0.01}";
	composition "Exterior_Lighting:{ZR:0.9;PR:0.1;PI:0.01}";
	composition "Interior_Lighting:{ZR:0.9;PR:0.1;PI:0.01}";
	composition "Office_Equipment:{ZR:0.9;PR:0.1;PI:0.01}";
	composition "Miscellaneous:{ZR:0.9;PR:0.1;PI:0.01}";
	composition "Process:{ZR:0.9;PR:0.1;PI:0.01}";
	composition "Motors:{ZR:0.9;PR:0.1;PI:0.01}";
	composition "Air_Compressors:{ZR:0.9;PR:0.1;PI:0.01}";
	object recorder {
		file test_ceus_small_office.csv;
		property total_power_A,total_power_B,total_power_C,total_real_power,total_reactive_power;
		interval 1h;
	};
}
object ceus {
	name large_office;
	filename "FCZ01_LOFF.csv";
	floor_area 100 ksf;
	composition "Heating:{ZR:0.9;PR:0.1;PI:0.01}";
	composition "Cooling:{ZR:0.9;PR:0.1;PI:0.01}";
	composition "Ventilation:{ZR:0.9;PR:0.1;PI:0.01}";
	composition "Water_Heating:{ZR:0.9;PR:0.1;PI:0.01}";
	composition "Refrigeration:{ZR:0.9;PR:0.1;PI:0.01}";
	composition "Exterior_Lighting:{ZR:0.9;PR:0.1;PI:0.01}";
	composition "Interior_Lighting:{ZR:0.9;PR:0.1;PI:0.01}";
	composition "Office_Equipment:{ZR:0.9;PR:0.1;PI:0.01}";
	composition "Miscellaneous:{ZR:0.9;PR:0.1;PI:0.01}";
	composition "Process:{ZR:0.9;PR:0.1;PI:0.01}";
	composition "Motors:{ZR:0.9;PR:0.1;PI:0.01}";
	composition "Air_Compressors:{ZR:0.9;PR:0.1;PI:0.01}";
	object recorder {
		file test_ceus_large_office.csv;
		property total_power_A,total_power_B,total_power_C,total_real_power,total_reactive_power;
		interval 1h;
	};
}

object ceus {
	name grocery;
	filename "FCZ01_GROC.csv";
	floor_area 10 ksf;
	composition "Heating:{ZR:0.9;PR:0.1;PI:0.01}";
	composition "Cooling:{ZR:0.9;PR:0.1;PI:0.01}";
	composition "Ventilation:{ZR:0.9;PR:0.1;PI:0.01}";
	composition "Water_Heating:{ZR:0.9;PR:0.1;PI:0.01}";
	composition "Refrigeration:{ZR:0.9;PR:0.1;PI:0.01}";
	composition "Exterior_Lighting:{ZR:0.9;PR:0.1;PI:0.01}";
	composition "Interior_Lighting:{ZR:0.9;PR:0.1;PI:0.01}";
	composition "Office_Equipment:{ZR:0.9;PR:0.1;PI:0.01}";
	composition "Miscellaneous:{ZR:0.9;PR:0.1;PI:0.01}";
	composition "Process:{ZR:0.9;PR:0.1;PI:0.01}";
	composition "Motors:{ZR:0.9;PR:0.1;PI:0.01}";
	composition "Air_Compressors:{ZR:0.9;PR:0.1;PI:0.01}";
	object recorder {
		file test_ceus_grocery.csv;
		property total_power_A,total_power_B,total_power_C,total_real_power,total_reactive_power;
		interval 1h;
	};
}

object ceus {
	name all_office;
	filename "FCZ01_AOFF.csv";
	floor_area 10 ksf;
	composition "Heating:{ZR:0.9;PR:0.1;PI:0.01}";
	composition "Cooling:{ZR:0.9;PR:0.1;PI:0.01}";
	composition "Ventilation:{ZR:0.9;PR:0.1;PI:0.01}";
	composition "Water_Heating:{ZR:0.9;PR:0.1;PI:0.01}";
	composition "Refrigeration:{ZR:0.9;PR:0.1;PI:0.01}";
	composition "Exterior_Lighting:{ZR:0.9;PR:0.1;PI:0.01}";
	composition "Interior_Lighting:{ZR:0.9;PR:0.1;PI:0.01}";
	composition "Office_Equipment:{ZR:0.9;PR:0.1;PI:0.01}";
	composition "Miscellaneous:{ZR:0.9;PR:0.1;PI:0.01}";
	composition "Process:{ZR:0.9;PR:0.1;PI:0.01}";
	composition "Motors:{ZR:0.9;PR:0.1;PI:0.01}";
	composition "Air_Compressors:{ZR:0.9;PR:0.1;PI:0.01}";
	object recorder {
		file test_ceus_all_office.csv;
		property total_power_A,total_power_B,total_power_C,total_real_power,total_reactive_power;
		interval 1h;
	};
}

object ceus {
	name college;
	filename "FCZ01_COLL.csv";
	floor_area 10 ksf;
	composition "Heating:{ZR:0.9;PR:0.1;PI:0.01}";
	composition "Cooling:{ZR:0.9;PR:0.1;PI:0.01}";
	composition "Ventilation:{ZR:0.9;PR:0.1;PI:0.01}";
	composition "Water_Heating:{ZR:0.9;PR:0.1;PI:0.01}";
	composition "Refrigeration:{ZR:0.9;PR:0.1;PI:0.01}";
	composition "Exterior_Lighting:{ZR:0.9;PR:0.1;PI:0.01}";
	composition "Interior_Lighting:{ZR:0.9;PR:0.1;PI:0.01}";
	composition "Office_Equipment:{ZR:0.9;PR:0.1;PI:0.01}";
	composition "Miscellaneous:{ZR:0.9;PR:0.1;PI:0.01}";
	composition "Process:{ZR:0.9;PR:0.1;PI:0.01}";
	composition "Motors:{ZR:0.9;PR:0.1;PI:0.01}";
	composition "Air_Compressors:{ZR:0.9;PR:0.1;PI:0.01}";
	object recorder {
		file test_ceus_college.csv;
		property total_power_A,total_power_B,total_power_C,total_real_power,total_reactive_power;
		interval 1h;
	};
}

object ceus {
	name all_warehouse;
	filename "FCZ01_AWHS.csv";
	floor_area 10 ksf;
	composition "Heating:{ZR:0.9;PR:0.1;PI:0.01}";
	composition "Cooling:{ZR:0.9;PR:0.1;PI:0.01}";
	composition "Ventilation:{ZR:0.9;PR:0.1;PI:0.01}";
	composition "Water_Heating:{ZR:0.9;PR:0.1;PI:0.01}";
	composition "Refrigeration:{ZR:0.9;PR:0.1;PI:0.01}";
	composition "Exterior_Lighting:{ZR:0.9;PR:0.1;PI:0.01}";
	composition "Interior_Lighting:{ZR:0.9;PR:0.1;PI:0.01}";
	composition "Office_Equipment:{ZR:0.9;PR:0.1;PI:0.01}";
	composition "Miscellaneous:{ZR:0.9;PR:0.1;PI:0.01}";
	composition "Process:{ZR:0.9;PR:0.1;PI:0.01}";
	composition "Motors:{ZR:0.9;PR:0.1;PI:0.01}";
	composition "Air_Compressors:{ZR:0.9;PR:0.1;PI:0.01}";
	object recorder {
		file test_ceus_all_warehouse.csv;
		property total_power_A,total_power_B,total_power_C,total_real_power,total_reactive_power;
		interval 1h;
	};
}

object ceus {
	name health;
	filename "FCZ01_HLTH.csv";
	floor_area 10 ksf;
	composition "Heating:{ZR:0.9;PR:0.1;PI:0.01}";
	composition "Cooling:{ZR:0.9;PR:0.1;PI:0.01}";
	composition "Ventilation:{ZR:0.9;PR:0.1;PI:0.01}";
	composition "Water_Heating:{ZR:0.9;PR:0.1;PI:0.01}";
	composition "Refrigeration:{ZR:0.9;PR:0.1;PI:0.01}";
	composition "Exterior_Lighting:{ZR:0.9;PR:0.1;PI:0.01}";
	composition "Interior_Lighting:{ZR:0.9;PR:0.1;PI:0.01}";
	composition "Office_Equipment:{ZR:0.9;PR:0.1;PI:0.01}";
	composition "Miscellaneous:{ZR:0.9;PR:0.1;PI:0.01}";
	composition "Process:{ZR:0.9;PR:0.1;PI:0.01}";
	composition "Motors:{ZR:0.9;PR:0.1;PI:0.01}";
	composition "Air_Compressors:{ZR:0.9;PR:0.1;PI:0.01}";
	object recorder {
		file test_ceus_health.csv;
		property total_power_A,total_power_B,total_power_C,total_real_power,total_reactive_power;
		interval 1h;
	};
}

object ceus {
	name lodging;
	filename "FCZ01_LODG.csv";
	floor_area 10 ksf;
	composition "Heating:{ZR:0.9;PR:0.1;PI:0.01}";
	composition "Cooling:{ZR:0.9;PR:0.1;PI:0.01}";
	composition "Ventilation:{ZR:0.9;PR:0.1;PI:0.01}";
	composition "Water_Heating:{ZR:0.9;PR:0.1;PI:0.01}";
	composition "Refrigeration:{ZR:0.9;PR:0.1;PI:0.01}";
	composition "Exterior_Lighting:{ZR:0.9;PR:0.1;PI:0.01}";
	composition "Interior_Lighting:{ZR:0.9;PR:0.1;PI:0.01}";
	composition "Office_Equipment:{ZR:0.9;PR:0.1;PI:0.01}";
	composition "Miscellaneous:{ZR:0.9;PR:0.1;PI:0.01}";
	composition "Process:{ZR:0.9;PR:0.1;PI:0.01}";
	composition "Motors:{ZR:0.9;PR:0.1;PI:0.01}";
	composition "Air_Compressors:{ZR:0.9;PR:0.1;PI:0.01}";
	object recorder {
		file test_ceus_lodging.csv;
		property total_power_A,total_power_B,total_power_C,total_real_power,total_reactive_power;
		interval 1h;
	};
}

object ceus {
	name miscellaneous;
	filename "FCZ01_MISC.csv";
	floor_area 10 ksf;
	composition "Heating:{ZR:0.9;PR:0.1;PI:0.01}";
	composition "Cooling:{ZR:0.9;PR:0.1;PI:0.01}";
	composition "Ventilation:{ZR:0.9;PR:0.1;PI:0.01}";
	composition "Water_Heating:{ZR:0.9;PR:0.1;PI:0.01}";
	composition "Refrigeration:{ZR:0.9;PR:0.1;PI:0.01}";
	composition "Exterior_Lighting:{ZR:0.9;PR:0.1;PI:0.01}";
	composition "Interior_Lighting:{ZR:0.9;PR:0.1;PI:0.01}";
	composition "Office_Equipment:{ZR:0.9;PR:0.1;PI:0.01}";
	composition "Miscellaneous:{ZR:0.9;PR:0.1;PI:0.01}";
	composition "Process:{ZR:0.9;PR:0.1;PI:0.01}";
	composition "Motors:{ZR:0.9;PR:0.1;PI:0.01}";
	composition "Air_Compressors:{ZR:0.9;PR:0.1;PI:0.01}";
	object recorder {
		file test_ceus_miscellaneous.csv;
		property total_power_A,total_power_B,total_power_C,total_real_power,total_reactive_power;
		interval 1h;
	};
}

object ceus {
	name refrigerated_warehouse;
	filename "FCZ01_REFW.csv";
	floor_area 10 ksf;
	composition "Heating:{ZR:0.9;PR:0.1;PI:0.01}";
	composition "Cooling:{ZR:0.9;PR:0.1;PI:0.01}";
	composition "Ventilation:{ZR:0.9;PR:0.1;PI:0.01}";
	composition "Water_Heating:{ZR:0.9;PR:0.1;PI:0.01}";
	composition "Refrigeration:{ZR:0.9;PR:0.1;PI:0.01}";
	composition "Exterior_Lighting:{ZR:0.9;PR:0.1;PI:0.01}";
	composition "Interior_Lighting:{ZR:0.9;PR:0.1;PI:0.01}";
	composition "Office_Equipment:{ZR:0.9;PR:0.1;PI:0.01}";
	composition "Miscellaneous:{ZR:0.9;PR:0.1;PI:0.01}";
	composition "Process:{ZR:0.9;PR:0.1;PI:0.01}";
	composition "Motors:{ZR:0.9;PR:0.1;PI:0.01}";
	composition "Air_Compressors:{ZR:0.9;PR:0.1;PI:0.01}";
	object recorder {
		file test_ceus_refrigerated_warehouse.csv;
		property total_power_A,total_power_B,total_power_C,total_real_power,total_reactive_power;
		interval 1h;
	};
}

object ceus {
	name restaurant;
	filename "FCZ01_REST.csv";
	floor_area 10 ksf;
	composition "Heating:{ZR:0.9;PR:0.1;PI:0.01}";
	composition "Cooling:{ZR:0.9;PR:0.1;PI:0.01}";
	composition "Ventilation:{ZR:0.9;PR:0.1;PI:0.01}";
	composition "Water_Heating:{ZR:0.9;PR:0.1;PI:0.01}";
	composition "Refrigeration:{ZR:0.9;PR:0.1;PI:0.01}";
	composition "Exterior_Lighting:{ZR:0.9;PR:0.1;PI:0.01}";
	composition "Interior_Lighting:{ZR:0.9;PR:0.1;PI:0.01}";
	composition "Office_Equipment:{ZR:0.9;PR:0.1;PI:0.01}";
	composition "Miscellaneous:{ZR:0.9;PR:0.1;PI:0.01}";
	composition "Process:{ZR:0.9;PR:0.1;PI:0.01}";
	composition "Motors:{ZR:0.9;PR:0.1;PI:0.01}";
	composition "Air_Compressors:{ZR:0.9;PR:0.1;PI:0.01}";
	object recorder {
		file test_ceus_restaurant.csv;
		property total_power_A,total_power_B,total_power_C,total_real_power,total_reactive_power;
		interval 1h;
	};
}

object ceus {
	name retail;
	filename "FCZ01_RETL.csv";
	floor_area 10 ksf;
	composition "Heating:{ZR:0.9;PR:0.1;PI:0.01}";
	composition "Cooling:{ZR:0.9;PR:0.1;PI:0.01}";
	composition "Ventilation:{ZR:0.9;PR:0.1;PI:0.01}";
	composition "Water_Heating:{ZR:0.9;PR:0.1;PI:0.01}";
	composition "Refrigeration:{ZR:0.9;PR:0.1;PI:0.01}";
	composition "Exterior_Lighting:{ZR:0.9;PR:0.1;PI:0.01}";
	composition "Interior_Lighting:{ZR:0.9;PR:0.1;PI:0.01}";
	composition "Office_Equipment:{ZR:0.9;PR:0.1;PI:0.01}";
	composition "Miscellaneous:{ZR:0.9;PR:0.1;PI:0.01}";
	composition "Process:{ZR:0.9;PR:0.1;PI:0.01}";
	composition "Motors:{ZR:0.9;PR:0.1;PI:0.01}";
	composition "Air_Compressors:{ZR:0.9;PR:0.1;PI:0.01}";
	object recorder {
		file test_ceus_retail.csv;
		property total_power_A,total_power_B,total_power_C,total_real_power,total_reactive_power;
		interval 1h;
	};
}

object ceus {
	name school;
	filename "FCZ01_SCHL.csv";
	floor_area 10 ksf;
	composition "Heating:{ZR:0.9;PR:0.1;PI:0.01}";
	composition "Cooling:{ZR:0.9;PR:0.1;PI:0.01}";
	composition "Ventilation:{ZR:0.9;PR:0.1;PI:0.01}";
	composition "Water_Heating:{ZR:0.9;PR:0.1;PI:0.01}";
	composition "Refrigeration:{ZR:0.9;PR:0.1;PI:0.01}";
	composition "Exterior_Lighting:{ZR:0.9;PR:0.1;PI:0.01}";
	composition "Interior_Lighting:{ZR:0.9;PR:0.1;PI:0.01}";
	composition "Office_Equipment:{ZR:0.9;PR:0.1;PI:0.01}";
	composition "Miscellaneous:{ZR:0.9;PR:0.1;PI:0.01}";
	composition "Process:{ZR:0.9;PR:0.1;PI:0.01}";
	composition "Motors:{ZR:0.9;PR:0.1;PI:0.01}";
	composition "Air_Compressors:{ZR:0.9;PR:0.1;PI:0.01}";
	object recorder {
		file test_ceus_school.csv;
		property total_power_A,total_power_B,total_power_C,total_real_power,total_reactive_power;
		interval 1h;
	};
}
