// generated by /Users/dchassin/Documents/github/slacgismo/gridlabd/converters/idf2glm.py on 2022-11-17 12:33:55.166345
// output to autotest/test_idf2glm_output.glm
class building {
	char32 weather;
	double occupancy[unit/sf];
	double lighting[W/sf];
	double equipment[W/sf];
	double floor_area[sf];
	double perimeter[ft];
	double roof_area[sf];
	double window_area[sf];
	double wall_area[sf];
	double foundation_f[Btu/degF/h];
}

// input from autotest/test_idf2glm_input.idf
object building {
	name "MidriseApartment-ASHRAE_169-2006-3C_created_2021-02-17_083953_";
	latitude 37.62;
	longitude -122.4;
	weather "${GEOCODE 37.62,-122.4#6}";
	occupancy 0.0179 unit/m^2;
	lighting 8.4 W/m^2;
	equipment 4.3 W/m^2;
	floor_area 127.5 m^2;
	perimeter 45.9 m;
	window_area 17.6 m^2;
	wall_area 126 m^2;
	roof_area 127 m^2;
	foundation_f 42.885217579932146 W/K;
}
#set savefile=${modelname/.glm/.json}
