#ifexist "../config.csv"
#system cp ../config.csv .
#endif

#input "config.csv" -f config -t config relax=FALSE

#if ${TEST1:-X} == A
#print ok
#else
#error TEST1==${TEST1:-X} failed
#endif

#if ${TEST2:-X} == B
#print ok
#else
#error TEST2==${TEST2:-X} failed
#endif
