#library config set CACHEDIR /tmp
#library config set DATADIR /tmp
#library get pole_configuration.glm
#include "/tmp/pole_configuration.glm"

class test {
	object lib;
}

module assert;
object test {
	lib "WOOD-C-45/5";
	object assert{
		target lib;
		relation "==";
		value "WOOD-C-45/5";
	};
}
