#ifexist "IEEE-13.glm"
#define DIR=.
#else
#set workdir=IEEE-13-cyme
#endif

#input "${DIR:-..}/IEEE-13-cyme.mdb" -t cyme
#include "${DIR:-..}/IEEE-13-cyme-modify.glm"

#output "mdb_cyme2png_profile.png" -t profile
