clock
{
    timezone "PST+8PDT";
    starttime "2020-01-01 00:00:00 PST";
    stoptime "2020-01-01 00:00:00 PST";
}
module residential
{
    implicit_enduses SUMP;
}
object house
{
    sump_status "OFF";
}
