// test load model fitting

clock {
	timezone "PST+8PDT";
	starttime "2017-09-01 00:00:00";
	stoptime "2017-10-01 00:00:00";
}

#python -m fit_filter -o=power.csv -i=weather.csv -c=load_model_config.py -C=output -P=weather.csv -g=/tmp/test.glm -k=3 -R=output.csv -I="2017-09-01T00:00:00" -d

#set debug=TRUE
#set output_message_context=TRANSFORM
#set suppress_repeat_messages=FALSE

#include "/tmp/test.glm"
