//////////////// Scenario 0: Load parent to meter ////////////////

#set suppress_repeat_messages=FALSE

#ifexist ../meters-withloads.glm
#define DIR=..
#endif

#system rm -f gridlabd.diff
#for MODEL_NAME in meters-withloads nodes-withloads notnodes-withloads links-to-meter links-to-triplexmeter link-to-notnode

#set randomseed=1

#gridlabd -D randomseed=1 -C ${DIR:-.}/${MODEL_NAME}.glm -o ${MODEL_NAME}.json

#python ${DIR:-.}/../create_meters.py ${MODEL_NAME}.json ${MODEL_NAME}-meters.json
#gridlabd -D randomseed=1 "${MODEL_NAME}-meters.json"

#ifexist ../${MODEL_NAME}-meters.glm
#on_exit 0 diff --unified=0 -I'^//.*' ../${MODEL_NAME}-meters.glm ${MODEL_NAME}-meters.glm >>gridlabd.diff
#endif

#done
