// generated by meteostat_weather at 2022-06-25 15:54:21.764598

module climate;

class weather {
    double sunshine_duration[m];
    int16 condition_code;
    double dewpoint[degF];
    double wind_gusts[mph];
}
object weather {
    name "test";
    latitude 37.5;
    longitude -122.3;
}

module tape;
object player {
    parent "test";
    file "test_meteostat_opt.csv";
    property "humidity,sunshine_duration,condition_code,temperature,dewpoint,rainfall,snowdepth,wind_speed,wind_gusts,pressure,wind_dir,solar_direct";
}
